// SBML level 2 version 4
// dcterms:bibliographicCitation: Km 0.033 and Kcat 8.5 urn:miriam:pubmed:3036844
// dcterms:bibliographicCitation: used values urn:miriam:pubmed:22229411
// dcterms:bibliographicCitation: urn:miriam:pubmed:6224784
// dcterms:bibliographicCitation: values used urn:miriam:pubmed:17402747
// dcterms:bibliographicCitation: urn:miriam:doi:10.1016/0003-9861(67)90262-7
// dcterms:bibliographicCitation: Keq urn:miriam:pubmed:16118205
// dcterms:bibliographicCitation: Km and kcat of Thermotoga maritima at 37°C urn:miriam:pubmed:19647806
// dcterms:bibliographicCitation: urn:miriam:doi:10.1021/bi049592e
// dcterms:bibliographicCitation: Km urn:miriam:pubmed:26385918
// dcterms:bibliographicCitation: Vmax of purified anzyme and Km for NR urn:miriam:pubmed:19027704
// dcterms:bibliographicCitation: urn:miriam:doi:10.1016/S0163-7258(00)00097-8
// dcterms:bibliographicCitation: original work calf Km and kcat calculated with MW of 92kDa urn:miriam:pubmed:9030766

function Product_inhibition_two_susbtrates_s2_const_scaling(ET, scaling, Kcat, S1, S2, Km, I, Ki)
  ET*scaling*Kcat*S1*S2/((Km + S1)*(1 + I/Ki));
end

// Arrhenius Equation:
// T in celsius
// A is frequency constant or Arrhenius factor (unitless)
// Ea is activation energy in kJ/mol
function Thermolysis(A, Ea, T, substrate)
  A*exp(-Ea*1000/(8.3145*(273 + T)))*substrate;
end

function Competitive_inihibition_two_substrate_Keq_and_scaling(E_T, scaling, kcat_A, A, Km_A, PA, Keq, B, Km_B, PB, Km_PB)
  E_T*scaling*(kcat_A*A/Km_A - kcat_A*PA/(Keq*Km_A))/(1 + A/Km_A + B/Km_B + PA*kcat_A/(Keq*Km_A*kcat_A*E_T) + PB/Km_PB);
end

function Competitie_inhibition_two_substrates_s2_const_scaling(E_T, scaling, kcat_A, A, Km_A, kcat_PA, PA, Km_PA, B, Km_B, PB, Km_PB)
  E_T*scaling*(kcat_A*A/Km_A - kcat_PA*PA/Km_PA)/(1 + A/Km_A + B/Km_B + PA/Km_PA + PB/Km_PB);
end

function Competitive_inhibition_scaling(ET, scaling, Kcat, S, Km, I, Ki)
  ET*scaling*Kcat*S/(Km + S + Km*I/Ki);
end

function Product_inhibition_scaling(ET, scaling, Kcat, S, Km, I, Ki)
  ET*scaling*Kcat*S/(Km + S + Km*I/Ki);
end

function TwosubstratesMMs2constant(E_T, turnover, s1, s2, scaling, Km)
  E_T*turnover*s1*s2*scaling/(Km + s1);
end

function MM_with_ET_and_scaling(ET, scaling, kcat, S, Km)
  ET*scaling*kcat*S/(Km + S);
end

model NAD_biosynthesis_model()
  // Sharma2022 - Temperature-dependent NAD biosynthesis model
  // A computational mathematical model of NAD biosynthesis via PncA and Nampt pathway in thermophiles. It includes the temperature dependence of the reaction rates.
  // hasProperty mamo:MAMO_0000046

  // Compartments:
  compartment NADA = 1;

  // Species:
  species NA_NADA in NADA = 0;
  species NaMN_NADA in NADA = 0;
  species NAM_NADA in NADA = 0;
  species NAD_NADA in NADA = Conc_NAD;
  species NaAD_NADA in NADA = 0;
  species NMN_NADA in NADA = 0;
  species NAR_NADA in NADA = 0;
  species $H2O_NADA in NADA = 1;
  species $ADP_NADA in NADA = 1;
  species $ATP_NADA in NADA = 1;
  // In E. coli intracellular concentration of 0.5mM (https://doi.org/10.1111/j.1432-1033.1982.tb06878.x)
  species $PPi_NADA in NADA = 0.012;
  species $PRPP_NADA in NADA = 1;
  species $AMP_NADA in NADA = 1;
  species $Gln_NADA in NADA = 1;
  species $Glu_NADA in NADA = 1;
  species $H3_ac_NADA in NADA = 1;
  species $H3_deac_NADA in NADA = 1;
  species $Pi_NADA in NADA = 1;
  species NR_NADA in NADA = 0;

  // Parameters:
  ET_NMNAT1 = 17848.97;
  enzyme_activity_scaling = 1e-10 unit_0;
  // Temperature difference to base temp (310K, 37°C)
  delta_T has unit_1;
  var ATP_consumption_NADA;
  Ea_enzymatic_reactions = 80 unit_2;
  NAM_import_velocity = 0; NAM_import_velocity is "NAM-import velocity";
  ET_NADA = 3.834865e-5; ET_NADA is "ET_PNCA";
  ET_NADS = 74976.98;
  ET_NAMPT = 1000000;
  ET_NAPRT = 1000000;
  ET_NRK1 = 229288.4;
  ET_NT5 = 100;
  ET_PNP = 268.8591;
  ET_SIRT = 60623.14;
  var Normed_ATP_consumption__NADA;
  var NAD_production_flux__NADA;
  Conc_NAD = 0.3; Conc_NAD is "Start_Conc_NAD";
  var Total_nicotin_moeity_concentration__NADA;
  var ATP_consumption_over_SIrt_flux__NADA;
  var ATP_consumption_over_NAD_concentration__NADA;
  temperature = 90;
  Ea_NAD = 89.82549;
  Ea_NaMN = 142.4912;
  Ea_NAR = 138.6059;
  Ea_NMN = 103.6235;
  Ea_NR = 72.4192;
  A_NAD = 2225797;
  A_NaMN = 2.127997e13;
  A_NAR = 1.249148e13;
  A_NMN = 3.693681e8;
  A_NR = 27083.62;
  Keq_NMNAT_NMN = 10;
  Initial_for_ET_NADS = ET_NADS;
  Initial_for_ET_NAMPT = ET_NAMPT;
  Initial_for_ET_NAPRT = ET_NAPRT;
  Initial_for_ET_NMNAT1 = ET_NMNAT1;
  Initial_for_ET_NRK1 = ET_NRK1;
  Initial_for_ET_NT5 = ET_NT5;
  Initial_for_ET_PNCA = ET_NADA;
  Initial_for_ET_PNP = ET_PNP;
  Initial_for_ET_SIRT = ET_SIRT;
  Initial_for_delta_T = delta_T;
  ModelValue_3 = enzyme_activity_scaling; ModelValue_3 is "Initial for enzyme_activity_scaling";
  Initial_for_temp_scaling = temp_scaling;
  Initial_for_temperature = temperature;

  // Assignment rules:
  ATP_consumption_NADA := NAPRT + 2*NADS + NMNAT1_NaMN + NAMPT_0 + NMNAT1_NMN + NRK1_NaMN + NRK1_NMN;
  delta_T := Initial_for_temperature - 37;
  temp_scaling := exp(Ea_enzymatic_reactions*1000/8.3145*(Initial_for_delta_T/((310 + Initial_for_delta_T)*310)));
  scaling := Initial_for_temp_scaling*ModelValue_3;
  NAD_production_flux__NADA := NADS + NMNAT1_NMN;
  production_thermolysis_NR := abs(NT5_NMN - NR_thermolysis);
  Normed_ATP_consumption__NADA := ATP_consumption_NADA/(NMNAT1_NMN + NADS);
  production_thermolysis_NAR := abs(NT5_NaMN - NAR_thermolysis);
  production_thermolysis_NaMN := abs(NMNAT1_NaMN + NAPRT - NaMN_thermolysis);
  production_thermolysis_NAD := abs(NADS - NAD_thermolysis);
  totalET := Initial_for_ET_NADS + Initial_for_ET_NAMPT + Initial_for_ET_NAPRT + Initial_for_ET_NMNAT1 + Initial_for_ET_NRK1 + Initial_for_ET_NT5 + Initial_for_ET_PNCA + Initial_for_ET_PNP + Initial_for_ET_SIRT;
  Total_nicotin_moeity_concentration__NADA := NaAD_NADA + NAD_NADA + NAM_NADA + NaMN_NADA + NA_NADA + NAR_NADA + NMN_NADA + NR_NADA;
  ATP_consumption_over_NAD_concentration__NADA := ATP_consumption_NADA/NAD_NADA;
  production_thermolysis_NMN := abs(NMNAT1_NMN + NAMPT_0 - NMN_thermolysis);
  ATP_consumption_over_SIrt_flux__NADA := ATP_consumption_NADA/SIRT;

  // Reactions:
  NADA_0: NAM_NADA + $H2O_NADA => NA_NADA; NADA*Product_inhibition_scaling(ET_NADA, scaling, NADA_0_Kcat, NAM_NADA, NADA_0_Km, NA_NADA, NADA_0_Ki); NADA_0 is "PNCA";  // isPartOf ec-code:3.5.1.19; isDescribedBy pubmed:22229411; isDescribedBy pubmed:3036844
    NADA_0_Kcat = 0.69; NADA_0_Km = 0.009; NADA_0_Ki = 0.1;
  NAPRT: NA_NADA + $ATP_NADA + $PRPP_NADA => NaMN_NADA + $ADP_NADA + $PPi_NADA; NADA*TwosubstratesMMs2constant(ET_NAPRT, NAPRT_turnover, NA_NADA, ATP_NADA, scaling, NAPRT_Km);  // ec-code:2.4.2.11; isDescribedBy pubmed:6224784
    NAPRT_turnover = 3.3; NAPRT_Km = 0.0015;
  NMNAT1_NaMN: NaMN_NADA + $ATP_NADA -> NaAD_NADA + $PPi_NADA; NADA*Competitie_inhibition_two_substrates_s2_const_scaling(ET_NMNAT1, scaling, NMNAT1_NaMN_kcat_A, NaMN_NADA, NMNAT1_NaMN_Km_A, kcat_PA, NaAD_NADA, Km_PA, NMN_NADA, NMNAT1_NaMN_Km_B, NAD_NADA, NMNAT1_NaMN_Km_PB); NMNAT1_NaMN is "NMNAT1-NaMN";  // modifiers: NMN_NADA, NAD_NADA; ec-code:2.7.7.1; ec-code:2.7.7.18; isDescribedBy pubmed:16118205; isDescribedBy pubmed:17402747
    NMNAT1_NaMN_kcat_A = 42.9; NMNAT1_NaMN_Km_A = 0.0677; kcat_PA = 103.8; Km_PA = 0.502; NMNAT1_NaMN_Km_B = 22.3; NMNAT1_NaMN_Km_PB = 0.059;
  NADS: NaAD_NADA + $ATP_NADA + $Gln_NADA + $H2O_NADA => $Glu_NADA + NAD_NADA + $PPi_NADA + $AMP_NADA; NADA*TwosubstratesMMs2constant(ET_NADS, NADS_turnover, NaAD_NADA, ATP_NADA, scaling, NADS_Km);  // ec-code:6.3.5.1; isDescribedBy pubmed:19647806
    NADS_turnover = 0.16; NADS_Km = 0.021;
  SIRT: NAD_NADA + $H3_ac_NADA => NAM_NADA + $H3_deac_NADA; NADA*Product_inhibition_two_susbtrates_s2_const_scaling(ET_SIRT, scaling, SIRT_Kcat, NAD_NADA, H3_ac_NADA, SIRT_Km, NAM_NADA, SIRT_Ki);  // isDescribedBy doi:10.1021/bi049592e
    SIRT_Kcat = 0.67; SIRT_Km = 0.029; SIRT_Ki = 0.06;
  // Alias NamPRT
  // Optimization to get same [NAD] as NADA system leads to ET=125
  NAMPT_0: NAM_NADA + $ATP_NADA + $PRPP_NADA => NMN_NADA + $Pi_NADA; NADA*Competitive_inhibition_scaling(ET_NAMPT, scaling, NAMPT_0_Kcat, NAM_NADA, NAMPT_0_Km, NAD_NADA, NAMPT_0_Ki);  // modifiers: NAD_NADA
    NAMPT_0_Kcat = 0.0077; NAMPT_0_Km = 5e-6; NAMPT_0_Ki = 0.0021;
  NMNAT1_NMN: NMN_NADA + $ATP_NADA -> NAD_NADA + $PPi_NADA; NADA*Competitive_inihibition_two_substrate_Keq_and_scaling(ET_NMNAT1, scaling, NMNAT1_NMN_kcat_A, NMN_NADA, NMNAT1_NMN_Km_A, NAD_NADA, Keq_NMNAT_NMN, NaMN_NADA, NMNAT1_NMN_Km_B, NaAD_NADA, NMNAT1_NMN_Km_PB); NMNAT1_NMN is "NMNAT1-NMN";  // modifiers: NaMN_NADA, NaAD_NADA
    NMNAT1_NMN_kcat_A = 53.8; NMNAT1_NMN_Km_A = 0.0223; NMNAT1_NMN_Km_B = 0.0677; NMNAT1_NMN_Km_PB = 0.502;
  // Km and Kcat from CN-II
  NT5_NaMN: NaMN_NADA + $H2O_NADA => NAR_NADA; NADA*MM_with_ET_and_scaling(ET_NT5, scaling, NT5_NaMN_kcat, NaMN_NADA, NT5_NaMN_Km); NT5_NaMN is "NT5-NaMN";  // isDescribedBy pubmed:26385918
    NT5_NaMN_kcat = 2.8; NT5_NaMN_Km = 3.5;
  // KM and Kcat for CN-III
  NT5_NMN: NMN_NADA + $H2O_NADA => NR_NADA; NADA*MM_with_ET_and_scaling(ET_NT5, scaling, NT5_NMN_kcat, NMN_NADA, NT5_NMN_Km); NT5_NMN is "NT5-NMN";  // isDescribedBy pubmed:26385918
    NT5_NMN_kcat = 0.5; NT5_NMN_Km = 5;
  // Kcat calculated from vmax of purified enzyme (600nmol/min*mg) using an MW of 23193 g/mol
  NRK1_NMN: NR_NADA + $ATP_NADA => NMN_NADA + $ADP_NADA; NADA*MM_with_ET_and_scaling(ET_NRK1, scaling, NRK1_NMN_kcat, NR_NADA, NRK1_NMN_Km); NRK1_NMN is "NRK1-NMN";  // modifiers: NAR_NADA; isDescribedBy pubmed:19027704
    NRK1_NMN_kcat = 0.23; NRK1_NMN_Km = 0.0034;
  PNP_NR: NR_NADA + $Pi_NADA => NAM_NADA; NADA*TwosubstratesMMs2constant(ET_PNP, PNP_NR_turnover, NR_NADA, Pi_NADA, scaling, PNP_NR_Km); PNP_NR is "PNP-NR";  // modifiers: NAR_NADA; isDescribedBy doi:10.1016/S0163-7258(00)00097-8; isDescribedBy pubmed:9030766
    PNP_NR_turnover = 40; PNP_NR_Km = 1.48;
  // Kcat calculated from vmax of purified enzyme (600nmol/min*mg) using an MW of 23193 g/mol for NMN
  NRK1_NaMN: NAR_NADA + $ATP_NADA => NaMN_NADA + $ADP_NADA; NADA*MM_with_ET_and_scaling(ET_NRK1, scaling, NRK1_NaMN_kcat, NAR_NADA, NRK1_NaMN_Km); NRK1_NaMN is "NRK1-NaMN";  // modifiers: NR_NADA; isDescribedBy pubmed:19027704
    NRK1_NaMN_kcat = 0.23; NRK1_NaMN_Km = 0.0034;
  // Parameter have to be adjusted for NAR...currently NR affinities are used
  PNP_NAR: NAR_NADA + $Pi_NADA => NA_NADA; NADA*TwosubstratesMMs2constant(ET_PNP, PNP_NAR_turnover, NAR_NADA, Pi_NADA, scaling, PNP_NAR_Km); PNP_NAR is "PNP-NAR";  // modifiers: NR_NADA; isDescribedBy doi:10.1016/S0163-7258(00)00097-8; isDescribedBy pubmed:9030766
    PNP_NAR_turnover = 40; PNP_NAR_Km = 1.48;
  // Data from Øyvind Strømland, Ziegler (unpublished)
  // NMR study of thermohydrolysis
  NMN_thermolysis: NMN_NADA => NAM_NADA; NADA*Thermolysis(A_NMN, Ea_NMN, temperature, NMN_NADA);
  NaMN_thermolysis: NaMN_NADA => NA_NADA; NADA*Thermolysis(A_NaMN, Ea_NaMN, temperature, NaMN_NADA);
  // Data from Øyvind Strømland, Ziegler (unpublished)
  // NMR study of thermohydrolysis
  NAR_thermolysis: NAR_NADA => NA_NADA; NADA*Thermolysis(A_NAR, Ea_NAR, temperature, NAR_NADA);
  NR_thermolysis: NR_NADA => NAM_NADA; NADA*Thermolysis(A_NR, Ea_NR, temperature, NR_NADA);
  // Data from Øyvind Strømland, Ziegler (unpublished)
  // NMR study of thermohydrolysis
  NAD_thermolysis: NAD_NADA => NAM_NADA; NADA*Thermolysis(A_NAD, Ea_NAD, temperature, NAD_NADA);

  // Unit definitions:
  unit length = metre;
  unit area = metre^2;
  unit volume = litre;
  unit time = second;
  unit substance = 1e-3 mole;
  unit unit_0 = dimensionless^0; unit_0 is "1";
  unit unit_1 = kelvin; unit_1 is "K";
  unit unit_2 = 1000 joule / mole; unit_2 is "kJ/mol";
end
